*Step, name="Pressure Field_No Rigid", nlgeom=YES
*Dynamic, Explicit
, 0.5
*Bulk Viscosity
5.0, 1.2
*VARIABLE MASS SCALING, TYPE=UNIFORM, FREQUENCY=100, DT=5.00E-7
*Contact, op=NEW
*Contact Inclusions
LEAFLET_SURFACES ,
*Contact Property Assignment
 ,  , Leaflet_Interaction_Property
*Output, field, variable=PRESELECT
*Output, history, variable=PRESELECT
*End Step
